// SBML level 2 version 4

model New_Model()

  // Compartments:
  compartment compartment = 1;

  // Species:
  species substrate in compartment = init_substrate;
  species $enzyme in compartment = init_enzyme;
  species complex in compartment = 0;
  species product in compartment = 0;

  // Parameters:
  init_substrate = 0;
  init_enzyme = 2;
  k_bind = 10;
  k_unbind = 1;
  k_convert = 10;
  k_create = 2;
  k_decay = 1;

  // Assignment rules:
  substrate_product := complex + product + substrate;

  // Reactions:
  creation: => substrate; compartment*k_create;
  binding: substrate + $enzyme -> complex; compartment*(k_bind*substrate*enzyme - k_unbind*complex);
  conversion: complex => $enzyme + product; compartment*k_convert*complex;
  decay: product => ; compartment*k_decay*product;

  // Unit definitions:
  unit volume = 1e-3 litre;
  unit substance = 1e-3 mole;
end
