// SBML level 2 version 4

model swameye2003()

  // Compartments:
  compartment cyt = 1.4;
  compartment nuc = 0.45;

  // Species:
  species log_pEpoR in cyt = log_pEpoR_t0;
  species STAT5 in cyt = 1;
  species pSTAT5 in cyt = 0;
  species pSTAT5_pSTAT5 in cyt = 0;
  species npSTAT5_npSTAT5 in nuc = 0;
  species nSTAT5_1 in nuc = 0;
  species nSTAT5_2 in nuc = 0;
  species nSTAT5_3 in nuc = 0;
  species nSTAT5_4 in nuc = 0;
  species nSTAT5_5 in nuc = 0;
  species nSTAT5_6 in nuc = 0;
  species nSTAT5_7 in nuc = 0;
  species nSTAT5_8 in nuc = 0;
  species nSTAT5_9 in nuc = 0;

  // Parameters:
  k1 = 1.95;
  k2 = 0.11;
  k3 = 98400;
  k4 = 1.49;
  log_pEpoR_t0 = -7;
  derivative_log_pEpoR = 0;

  // Rate rules:
  log_pEpoR' = derivative_log_pEpoR;

  // Reactions:
  reaction1: STAT5 => pSTAT5; cyt*k1*STAT5*exp(log_pEpoR);  // modifiers: log_pEpoR
  reaction2: 2 pSTAT5 => pSTAT5_pSTAT5; cyt*k2*pSTAT5^2;
  reaction3: pSTAT5_pSTAT5 => npSTAT5_npSTAT5; cyt*k3*pSTAT5_pSTAT5;
  reaction4_01: npSTAT5_npSTAT5 => 2 nSTAT5_1; nuc*k4*npSTAT5_npSTAT5;
  reaction4_02: nSTAT5_1 => nSTAT5_2; nuc*k4*nSTAT5_1;
  reaction4_03: nSTAT5_2 => nSTAT5_3; nuc*k4*nSTAT5_2;
  reaction4_04: nSTAT5_3 => nSTAT5_4; nuc*k4*nSTAT5_3;
  reaction4_05: nSTAT5_4 => nSTAT5_5; nuc*k4*nSTAT5_4;
  reaction4_06: nSTAT5_5 => nSTAT5_6; nuc*k4*nSTAT5_5;
  reaction4_07: nSTAT5_6 => nSTAT5_7; nuc*k4*nSTAT5_6;
  reaction4_08: nSTAT5_7 => nSTAT5_8; nuc*k4*nSTAT5_7;
  reaction4_09: nSTAT5_8 => nSTAT5_9; nuc*k4*nSTAT5_8;
  reaction4_10: nSTAT5_9 => STAT5; nuc*k4*nSTAT5_9;

  // Unit definitions:
  unit time = 60 second;
end
