// SBML level 3 version 2

model debug()
  // model units - substance: substance, time: time_unit, volume: volume, area: area, length: length

  // Compartments:
  compartment cytosol = 0.0005;

  // Species:
  species MR_i in cytosol = MR_i_t0;
  species MR_m in cytosol = MR_m_t0;

  // Parameters:
  synthesis_MR = 0.005851773/0.00606;
  recycling = 0.0000045;
  binding = (recycling*MR_i - synthesis_MR)/MR_m;
  MR_i_t0 = 1400000;
  MR_m_t0 = 600000;

  // Reactions:
  _J0: -> MR_i; synthesis_MR;
  _J1: MR_i -> MR_m; recycling*MR_i;
  _J2: MR_m -> MR_i; binding*MR_m;

  // Unit definitions:
  unit length = metre;
  unit area = metre^2;
  unit volume = litre;
  unit time_unit = 60 second;
  unit substance = 1e-9 mole;
end
